// COMSOL Multiphysics 6.2.0.415 model "magnet_simulation.mph"
// Outline of the model tree

Parameters
  Mt = 24[mm]
  Mh = 12[mm]
  Ml = 90[mm]
  Md = 19[mm]
  Ed = 9[mm]
  Et = 14[mm]
  Ve = 3441[V]
  Ll = 50[mm]
  E0 = 30[keV]
  vf = sqrt(2*E0/mp_const)
  T = Ml/vf
  Rt = 30[mm]
  Rout = 3.12[mm]
  Rin = 6[mm]

Selections
  sel1: Explicit "Upper Electrode" on boundaries adjacent to domains 6, 7, 9
  sel2: Explicit "Lower Electrode" on boundaries adjacent to domains 4, 5, 8
  sel3: Explicit "Extrude" on boundaries 17-22, 28, 37, 45, 48, 53, 55, 60, 63, 66-68

Geometry
  geom1 "Geometría 1" (3D, length unit mm)
    blk1: Block "Magnet1" | pos = {0, 0, -Md/2-Mh/2}; base = center; size = {Ml, Mt, Mh}
    blk2: Block "Magnet2" | pos = {0, 0, Mh/2+Md/2}; base = center; size = {Ml, Mt, Mh}
    blk3: Block "Air" | base = center; size = {100, 100, 100}
    blk5: Block "Upper Electrode" | pos = {0, Ed/2+0.5, 0}; base = center; size = {Ll, 1, Et}
    blk4: Block "Lower Electrode" | pos = {0, -Ed/2-0.5, 0}; base = center; size = {Ll, 1, Et}
    wp1: WorkPlane "Rogowski Profiles" | quickz = -7; unite = on
      pc1: ParametricCurve "Curva paramétrica 1"
        pos = {41, 0}
        parname = u
        parmin = -2*pi
        parmax = pi/3
        coord = {Ed*u/pi, Ed*(pi/2 + exp(u))/pi}
      pc2: ParametricCurve "Curva paramétrica 2"
        pos = {41, 1}
        parname = u
        parmin = -2*pi
        parmax = pi/3
        coord = {Ed*u/pi, Ed*(pi/2 + exp(u))/pi}
      ls1: LineSegment "Segmento de línea 1" | vertex1 = pc1(1) points 1; vertex2 = pc2(1) points 1
      ls2: LineSegment "Segmento de línea 2" | vertex1 = pc1(1) points 2; vertex2 = pc2(1) points 2
      pc3: ParametricCurve "Curva paramétrica 3"
        pos = {41, 0}
        parname = u
        parmin = -2*pi
        parmax = pi/3
        coord = {Ed*u/pi, -Ed*(pi/2 + exp(u))/pi}
      pc4: ParametricCurve "Curva paramétrica 4"
        pos = {41, -1}
        parname = u
        parmin = -2*pi
        parmax = pi/3
        coord = {Ed*u/pi, -Ed*(pi/2 + exp(u))/pi}
      ls3: LineSegment "Segmento de línea 3" | vertex1 = pc3(1) points 2; vertex2 = pc4(1) points 2
      ls4: LineSegment "Segmento de línea 4" | vertex1 = pc3(1) points 1; vertex2 = pc4(1) points 1
      pc5: ParametricCurve "Curva paramétrica 5"
        pos = {-41, 0}
        parname = u
        parmin = -2*pi
        parmax = pi/3
        coord = {-Ed*u/pi, -Ed*(pi/2 + exp(u))/pi}
      pc6: ParametricCurve "Curva paramétrica 6"
        pos = {-41, -1}
        parname = u
        parmin = -2*pi
        parmax = pi/3
        coord = {-Ed*u/pi, -Ed*(pi/2 + exp(u))/pi}
      ls5: LineSegment "Segmento de línea 5" | vertex1 = pc5(1) points 1; vertex2 = pc6(1) points 1
      ls6: LineSegment "Segmento de línea 6" | vertex1 = pc5(1) points 2; vertex2 = pc6(1) points 2
      pc7: ParametricCurve "Curva paramétrica 7"
        pos = {-41, 0}
        parname = u
        parmin = -2*pi
        parmax = pi/3
        coord = {-Ed*u/pi, Ed*(pi/2 + exp(u))/pi}
      pc8: ParametricCurve "Curva paramétrica 8"
        pos = {-41, 1}
        parname = u
        parmin = -2*pi
        parmax = pi/3
        coord = {-Ed*u/pi, Ed*(pi/2 + exp(u))/pi}
      ls7: LineSegment "Segmento de línea 7" | vertex1 = pc7(1) points 2; vertex2 = pc8(1) points 2
      ls8: LineSegment "Segmento de línea 8" | vertex1 = pc7(1) points 1; vertex2 = pc8(1) points 1
    ext1: Extrude "Profile Extrude" | workplane = wp1; input = wp1; distance = 14
    wp2: WorkPlane "Beam Origin" | quickplane = yz; quickx = -45; unite = on
      c1: Circle "Círculo 1" | r = 3
    wp3: WorkPlane "Tube" (disabled) | unite = on
      r1: Rectangle "Outlet" | pos = {Ml/2, Rout}; size = {4, Rt-Rout}
      r2: Rectangle "Inlet" | pos = {-Ml/2-4, Rin}; size = {4, Rt-Rin}
      r3: Rectangle "Tube" | pos = {0, Rt-1}; base = center; size = {Ml, 2}
    rev1: Revolve "Revolucionar 1" (disabled)
      workplane = wp3
      input = wp3
      angtype = full
      origfaces = off
      axis = {1, 0}
      revaxis = {{0, 1}, {0, 0}}
    fin: Finalize "Formar unión"
  pgeom_cpt "Geometría" (1D, length unit m)
    pt1: Point "Punto 1"

Materials
  mat1: Common "N52 (Sintered NdFeB)" on domains 2, 3
    def "Basic"
      electricconductivity = 1/1.4[uohm*m]
      relpermittivity = 1
    RemanentFluxDensity
      murec = 1.05
      normBr = 1.44[T]

Physics
  mf: InductionCurrents "Campos magnéticos" on all domains
    dependent variable A = {Ax, Ay, Az}
    fsp1: FreeSpace "Espacio libre 1" (default) | freqType = from_solver; sigma_stab_mat = automatic
    mi1: MagneticInsulation "Aislamiento magnético 1" (default)
    init1: init "Valores iniciales 1" (default)
    mag1: Magnet on domains 2
      north1: North on boundaries 9, 25, 29, 34, 38, 51, 56
      south1: South on boundaries 8
    mag2: Magnet on domains 3
      north1: North on boundaries 13
      south1: South on boundaries 12, 26, 30, 35, 39, 52, 57
  es: Electrostatics "Electroestática" on all domains
    dependent variable V
    ccn1: ChargeConservation "Conservación de carga eléctrica 1" (default) | epsilonr_mat = userdef; epsilonr = 1
    zc1: ZeroCharge "Carga nula 1" (default)
    init1: init "Valores iniciales 1" (default)
    pot2: ElectricPotential "Upper Potential" on boundaries 17-19, 23-31, 42, 43, 48-53, 61-63, 67 | V0 = Ve
    pot1: ElectricPotential "Lower Potential" on boundaries 20-22, 32-40, 44-46, 54-57, 59, 60, 64-66, 68 | V0 = -Ve
  cpt: ChargedParticleTracing "Trazado de partículas con carga" on all domains
    dependent variable q = {qx, qy, qz}
    wall1: Wall "Pared 1" (default)
    pp1: ParticleProperties "Proton" | mp = mp_const; Z = 1
    wall2: Wall "Pared 2" on no boundaries | WallCondition = Disappear
    pbeam1: ParticleBeam "Proton Beam" on boundaries 14
      N = 5000
      twbeta0 = 0.4[m]
      e1rms = 0.002[mm]
      El = 30[keV]
      ReverseDirection = 1
    ef1: ElectricForce "Fuerza eléctrica (#0), componente #1 1" on domains 1 | E_src = root.comp1.es.Ex
    mf1: MagneticForce "Fuerza magnética (#0), componente #1 1" on domains 1 | B_src = root.comp1.mf.Bx

Mesh
  mesh1 "Malla 1"
    size1: Size "Tamaño 1" on domains 2-9 | hauto = 3
    size2: Size "Tamaño 2" on selection sel3 | hauto = 3
    ftet1: FreeTet "Tetraédrico libre 1" on remaining entities

Studies
  std1 "Estudio 1"
    stat: Stationary "Estacionario"
  std2 "Estudio 2"
    time: Transient "Temporal"
      tunit = ns
      tlist = range(0,T/20,T*1.05)
      solve for = {cpt}
      usesol = on
      notsolmethod = sol
      notstudy = std1

Solver configurations
  sol1 "Solución 1" (study std1)
    v1: Variables "Variables dependientes 1"
    s1: Stationary "Resolvedor estacionario 1"
      se1: Segregated "Segregado 1" | segstabacc = segaacc
        ss1: SegregatedStep "Electroestática" | segvar = {comp1_V}; linsolver = i1
        ss2: SegregatedStep "Campos magnéticos" | segvar = {comp1_A}; linsolver = i2
      i1: Iterative "Iterativo 1" | linsolver = cg
        mg1: Multigrid "Multimalla 1" | prefun = amg; coarseningmethod = classic
      i2: Iterative "Iterativo 2" | linsolver = fgmres; nlinnormuse = on
        mg1: Multigrid "Multimalla 1"
  sol2 "Solución 2" (study std2)
    v1: Variables "Variables dependientes 1"
    t1: Time "Resolvedor temporal 1"
      tlist = range(0,T/20,T*1.05)
      rtol = 1.0E-5
      timemethod = genalpha
      estrat = exclude
      tstepsgenalpha = strict
      rhoinf = 1
      fc1: FullyCoupled "Completamente acoplado 1" | linsolver = i1; ntolfact = 0.1
      i1: Iterative "Iterativo 1"
        ja1: Jacobi

Datasets
  dset1: Solution | solution = sol1
  cln1: CutLine3D "Linea de corte en 3D 1" | data = dset1; method = pointdir; genpoints = {{0, 0, -50}, {0, 0, 50}}
  cln2: CutLine3D "Linea de corte en 3D 2"
    data = dset1
    method = pointdir
    genpoints = {{0, 0, -50}, {0, 0, 50}}
    pddir = {0, 0, 1}
  dset2: Solution | solution = sol2
  part1: Particle "Partícula 1"
    solution = sol2
    pgeomspec = fromphysics
    pgeom = pgeom_cpt
    posdof = {comp1.qx, comp1.qy, comp1.qz}
    physicsinterface = cpt

Plots
  pg1: PlotGroup3D "Densidad de flujo magnético, norma (mf)" | data = dset1
    mslc1: Multislice "Rebanadas múltiples 1"
      data = dset1
      expr = mf.normB
      multiplanexmethod = coord
      xcoord = mf.CPx
      multiplaneymethod = coord
      ycoord = mf.CPy
      multiplanezmethod = coord
      zcoord = mf.CPz
    strmsl1: StreamlineMultislice
      expr = {mf.Bx, mf.By, mf.Bz}
      multiplanexmethod = coord
      xcoord = mf.CPx
      multiplaneymethod = coord
      ycoord = mf.CPy
      multiplanezmethod = coord
      zcoord = mf.CPz
      udist = 0.02
      col1: Color "Expresión de color 1" | expr = mf.normB
      filt1: Filter "Filtro 1" | expr = !isScalingSystemDomain
  pg5: PlotGroup3D "Campo eléctrico, norma (es)" | data = dset1
    mslc1: Multislice "Rebanadas múltiples 1"
      expr = es.normE
      multiplanexmethod = coord
      xcoord = es.CPx
      multiplaneymethod = coord
      ycoord = es.CPy
      multiplanezmethod = coord
      zcoord = es.CPz
    strmsl1: StreamlineMultislice
      expr = {es.Ex, es.Ey, es.Ez}
      multiplanexmethod = coord
      xcoord = es.CPx
      multiplaneymethod = coord
      ycoord = es.CPy
      multiplanezmethod = coord
      zcoord = es.CPz
      udist = 0.02
      col1: Color "Expresión de color 1" | expr = es.normE
      filt1: Filter "Filtro 1" | expr = !isScalingSystemDomain
  pg8: PlotGroup3D "Potencial eléctrico (es)" | data = dset1
    mslc1: Multislice "Rebanadas múltiples 1"
      expr = V
      multiplanexmethod = coord
      xcoord = es.CPx
      multiplaneymethod = coord
      ycoord = es.CPy
      multiplanezmethod = coord
      zcoord = es.CPz
    strmsl1: StreamlineMultislice
      expr = {es.Ex, es.Ey, es.Ez}
      multiplanexmethod = coord
      xcoord = es.CPx
      multiplaneymethod = coord
      ycoord = es.CPy
      multiplanezmethod = coord
      zcoord = es.CPz
      udist = 0.02
      col1: Color "Expresión de color 1" | expr = V
      filt1: Filter "Filtro 1" | expr = !isScalingSystemDomain
  pg2: PlotGroup1D "Magnetic Flux Density x-direction" | data = dset1
    lngr1: LineGraph "Gráfico lineal 1" | data = cln1; expr = mf.normB; xdata = spacevar
  pg3: PlotGroup1D "Needed Electric Field" | data = dset1
    lngr1: LineGraph "Gráfico lineal 1" | data = cln1; expr = mf.normB*(2.39E6)
  pg4: PlotGroup1D "Real Electric Field" | data = dset1
    lngr1: LineGraph "Gráfico lineal 1" | data = cln1; expr = es.normE; descr = Campo eléctrico, norma
  pg6: PlotGroup1D "Superposition Electric Field" | data = dset1
    lngr1: LineGraph "Gráfico lineal 1" | data = cln1; expr = mf.normB*(2.398E6); legends = Needed E
    lngr2: LineGraph "Gráfico lineal 2"
      data = cln1
      expr = es.normE
      descr = Campo eléctrico, norma
      autosolution = off
      legends = Simulated E
  pg7: PlotGroup1D "E/B graph" | data = dset1
    lngr1: LineGraph "Gráfico lineal 1" | data = cln1; expr = es.normE/mf.normB
  pg9: PlotGroup3D "Trayectorias de partícula (cpt)" | data = part1
    traj1: ParticleTrajectories "Trayectorias de partícula 1"
      col1: Color "Expresión de color 1" | expr = cpt.V
  pg10: PlotGroup3D "Posición media del haz (cpt)" | data = part1
    pttraj1: PointTrajectories "Trayectorias de puntos 1"
      plotdata = global
      globalexpr = {cpt.qavx, cpt.qavy, cpt.qavz}
      expr = {cpt.qavx, cpt.qavy, cpt.qavz}
      col1: Color "Expresión de color 1" | expr = cpt.e1hrms